** EMOCD A4 -- chassis plate, clamped webs
*NODE, NSET=Nall
1, -180.000000, 85.000000, 14.000000
2, 308.000000, 85.000000, 14.000000
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*ELEMENT, TYPE=C3D10, ELSET=Eall
10353, 13098, 11054, 4245, 19836, 14180, 19856, 19857, 19858, 19860, 19859
10354, 12055, 11949, 3207, 19837, 18540, 19861, 19862, 19863, 19865, 19864
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*NSET, NSET=Nweb
339, 357, 363, 380, 386, 404
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*NSET, NSET=Nload
341, 342, 343, 344, 345, 346
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*MATERIAL, NAME=Ti6Al4V
*ELASTIC
113800.0, 0.342
*DENSITY
4.430e-09
*SOLID SECTION, ELSET=Eall, MATERIAL=Ti6Al4V
*BOUNDARY
Nweb, 1,3
*STEP
*STATIC
*CLOAD
Nload, 3, -0.905772
*NODE PRINT, NSET=Nall
U
*EL PRINT, ELSET=Eall
S
*END STEP
